read mesh.inp

comp PCONT1 do
comp PCONT1 do
send PCONT1 abq sur

comp PCONT2 do
comp PCONT2 do
send PCONT2 abq sur

comp PCONT3 do
comp PCONT3 do
send PCONT3 abq sur

comp WCONT1 do
comp WCONT1 do
send WCONT1 abq sur

comp WCONT2 do
comp WCONT2 do
send WCONT2 abq sur

comp WCONT3 do
comp WCONT3 do
send WCONT3 abq sur
